# 1) Initialization
units           lj
dimension       3
atom_style      atomic
pair_style      lj/cut 2.5
boundary        p p p

# 2) System definition
read_data       minimized_coordinate.data

region          cylinder_in cylinder z 0 0 10 INF INF side in
region          cylinder_out cylinder z 0 0 10 INF INF side out
group           group_type_1 type 1
group           group_type_2 type 2
group           group_region_in region cylinder_in
group           group_region_out region cylinder_out
group           group_type_1_in intersect group_type_1 group_region_in
group           group_type_2_out intersect group_type_2 group_region_out
delete_atoms    group group_type_1_in
delete_atoms    group group_type_2_out

variable        n1_in equal count(group_type_1,cylinder_in)
variable        n2_in equal count(group_type_2,cylinder_in)

compute         coor12   group_type_1 coord/atom cutoff 2.0 group group_type_2
compute         sumcoor12 all reduce ave c_coor12

# 4) Visualization
thermo          1000
thermo_style    custom step temp pe ke etotal press v_n1_in v_n2_in c_sumcoor12
dump            mydmp    all      image 100 dump.md.*.jpg type type shiny 0.1 box no 0.01 view 0 0 zoom 1.8
dump_modify     mydmp acolor 1 darkturquoise acolor 2 darkblue adiam 1 1 adiam 2 3 backcolor white

# 5) Run
velocity        all create 1.0 4928459 mom yes rot yes dist gaussian
fix             mynve    all      nve
fix             mylgv    all      langevin 1.0 1.0 0.1 1530917 zero yes
timestep        0.005
run             300000
