# 1) Initialization
units           lj
dimension       3

atom_style      atomic
pair_style      lj/cut 2.5
boundary        p p p

# 2) System definition
region          simulation_box block -20 20 -20 20 -20 20
create_box      2 simulation_box
region          cylinder_in cylinder z 0 0 10 INF INF side in
region          cylinder_out cylinder z 0 0 10 INF INF side out
create_atoms    1 random 1000 341341 cylinder_out
create_atoms    2 random 150 127569 cylinder_in

# 3) Settings
mass            1    1
mass            2    1
pair_coeff      1    1    1.0 1.0
pair_coeff      2    2    0.5 3.0

# 4) Visualization
thermo          10
thermo_style    custom step etotal press
dump            mydmp    all      image 100 dump.min.*.jpg type type shiny 0.1 box no 0.01 view 0 0 zoom 1.8
dump_modify     mydmp acolor 1 darkturquoise acolor 2 darkblue adiam 1 1 adiam 2 3 backcolor white

# 5) Run
minimize        1.0e-4 1.0e-6 1000 10000
write_data      minimized_coordinate.data
